** DCB with a zero-thickness adhesive interface.
*Heading
 3D-DCB delamination with Uinter
** Job name: DCBuinter Model name: DCB-uint
** Generated by: Abaqus/CAE 6.14-1
*Preprint, echo=NO, model=NO, history=NO, contact=NO
**
** PARTS
**
*Part, name="BOTTOM arm"
*Node
      1,         237.,           0.,           0.
      2,         237.,           0.,         12.5
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*Element, type=C3D8
   1,   126,  1881, 17493,  1737,     1,    17,  1497,    62
   2,  1881,  1882, 17494, 17493,    17,    18,  1498,  1497
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*Node
  60963,         237.,         -1.5,         12.5
*Nset, nset="BOTTOM arm-RefPt_", internal
60963,
*Nset, nset=Set-2, generate
     1,  60962,      1
*Elset, elset=Set-2, generate
     1,  52000,      1
*Orientation, name=Ori-1
1., 0., 0., 0., 1., 0.
1, -90.
** Section: LaminateSection
*Solid Section, elset=Set-2, orientation=Ori-1, material=UDLaminate
,
*End Part
**
*Part, name="TOP arm"
*Node
      1,         237.,          1.5,         12.5
      2,         237.,          1.5,           0.
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*Element, type=C3D8
   1,   154,  2217, 17493,  1947,     1,    17,  1497,    76
   2,  2217,  2218, 17494, 17493,    17,    18,  1498,  1497
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*Node
  60963,         237.,          1.5,         12.5
*Nset, nset="TOP arm-RefPt_", internal
60963,
*Nset, nset=Set-1, generate
     1,  60962,      1
*Elset, elset=Set-1, generate
     1,  52000,      1
*Orientation, name=Ori-1
1., 0., 0., 0., 1., 0.
1, -90.
** Section: LaminateSection
*Solid Section, elset=Set-1, orientation=Ori-1, material=UDLaminate
,
*End Part
**
**
** ASSEMBLY
**
*Assembly, name=Assembly
**
*Instance, name="BOTTOM ARM-1", part="BOTTOM arm"
*End Instance
**
*Instance, name="TOP ARM-1", part="TOP arm"
*End Instance
**
*Nset, nset="BOTTOM ARM-1", instance="BOTTOM ARM-1", generate
     1,  60962,      1
*Elset, elset="BOTTOM ARM-1", instance="BOTTOM ARM-1", generate
     1,  52000,      1
*Nset, nset=BotRP, instance="BOTTOM ARM-1"
 5,
*Nset, nset=InitialFront, instance="TOP ARM-1"
   6,   7, 107, 108, 109, 110
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*Elset, elset=InitialFront, instance="TOP ARM-1", generate
 2545,  2576,     1
*Nset, nset=SlaveSurf, instance="TOP ARM-1"
    6,    7,    9,   10,  107,  108
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*Elset, elset=SlaveSurf, instance="TOP ARM-1", generate
 2561,  7360,     1
*Nset, nset=SymmPlane, instance="TOP ARM-1"
    7,    8,    9,   14,  122,  123
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*Nset, nset="TOP ARM-1", instance="TOP ARM-1", generate
     1,  60962,      1
*Elset, elset="TOP ARM-1", instance="TOP ARM-1", generate
     1,  52000,      1
*Nset, nset=TopRP, instance="TOP ARM-1"
 1,
*Nset, nset=s_Set-4, instance="TOP ARM-1"
  1,  2, 17, 18, 19, 20
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*Elset, elset=s_Set-4, instance="TOP ARM-1"
     1,     2,     3,     4,     5,     6
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*Nset, nset=s_Set-5, instance="BOTTOM ARM-1"
  5,  8, 63, 64, 65, 66
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*Elset, elset=s_Set-5, instance="BOTTOM ARM-1"
 1297, 1298, 1299, 1300, 1301, 1302
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*Nset, nset=s_Set-13, instance="TOP ARM-1"
  1,  2, 17, 18, 19, 20
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*Elset, elset=s_Set-13, instance="TOP ARM-1"
     1,     2,     3,     4,     5,     6
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*Nset, nset=s_Set-14, instance="BOTTOM ARM-1"
  5,  8, 63, 64, 65, 66
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*Elset, elset=s_Set-14, instance="BOTTOM ARM-1"
 1297, 1298, 1299, 1300, 1301, 1302
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*Nset, nset=zsymm_surf, instance="BOTTOM ARM-1"
     2,     3,     5,     6,    10,    12
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*Nset, nset=zsymm_surf, instance="TOP ARM-1"
     1,     4,     7,     8,     9,    11
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*Elset, elset=_bottom_surf_S4, internal, instance="BOTTOM ARM-1", generate
  4010,  52000,     10
*Surface, type=ELEMENT, name=bottom_surf
_bottom_surf_S4, S4
*Elset, elset=_top_surf_S2, internal, instance="TOP ARM-1", generate
 2561,  7360,     1
*Surface, type=ELEMENT, name=top_surf
_top_surf_S2, S2
*Surface, type=NODE, name=s_Set-13_CNS_, internal
s_Set-13, 1.
*Surface, type=NODE, name=s_Set-14_CNS_, internal
s_Set-14, 1.
** Constraint: Constraint-1
*MPC
BEAM, s_Set-13, TopRP
** Constraint: Constraint-2
*MPC
BEAM, s_Set-14, BotRP
*End Assembly
*Amplitude, name=Amp-1
             0.,              1.,              1.,              1.
**
** MATERIALS
**
*Material, name=Material-2
*Elastic
135000., 0.3
** 8552/AS4 unidirectional laminate
*Material, name=UDLaminate
*Elastic, type=ENGINEERING CONSTANTS
135000.,10000.,10000.,   0.3,   0.3,   0.4, 5000., 5000.
 5000.,
**
** INTERACTION PROPERTIES
**
*Surface Interaction, name=IntProp-1
1.,
*Cohesive Behavior
**
** BOUNDARY CONDITIONS
**
** Name: BC-1 Type: Symmetry/Antisymmetry/Encastre
*Boundary
zsymm_surf, ZSYMM
** Name: BC-2 Type: Displacement/Rotation
*Boundary
TopRP, 1, 1
TopRP, 5, 5
** Name: BC-3 Type: Displacement/Rotation
*Boundary
BotRP, 1, 1
BotRP, 5, 5
**
** INTERACTIONS
**
** Interaction: Int-1
*Contact Pair, interaction=IntProp-1, small sliding, type=SURFACE TO SURFACE
top_surf, bottom_surf
** ----------------------------------------------------------------
**
** STEP: Step-1
**
*Step, name=Step-1, nlgeom=NO, inc=10, solver=ITERATIVE, unsymm=NO
*Static, direct
0.1, 1.,
**
** BOUNDARY CONDITIONS
**
** Name: BC-4 Type: Displacement/Rotation
*Boundary, amplitude=Amp-1
TopRP, 2, 2, 1.
** Name: BC-5 Type: Displacement/Rotation
*Boundary, amplitude=Amp-1
BotRP, 2, 2, -1.
**
** OUTPUT REQUESTS
**
*Restart, write, frequency=1
**
** FIELD OUTPUT: F-Output-4
**
*Output, field, frequency=99999
*Node Output, nset=InitialFront
COORD, U
*Element Output, elset=InitialFront, directions=YES
SDV,
**
** FIELD OUTPUT: F-Output-1
**
*Node Output, nset="TOP ARM-1"
U,
*Element Output, elset="TOP ARM-1", directions=YES
SDV,
*Contact Output, nset="TOP ARM-1"
CDISP, CSTRESS,
**
** FIELD OUTPUT: F-Output-3
**
*Node Output, nset=TopRP
CF, TF, U
**
** HISTORY OUTPUT: H-Output-1
**
*Output, history, frequency=99999
*Energy Output
ALLSE, ALLWK
**
** HISTORY OUTPUT: H-Output-2
**
*Node Output, nset=TopRP
CF2, RF1, RF2, TF2, U1, U2
*End Step
